# Лабораторная работа №1 студента Врублевского Никиты Андреевича
# 1.
n := 3
x := 28
# 2.
# a)
4*sqrt(5 - 2*sqrt(6))/((nthroot(3, 4) + nthroot(2, 4))*(nthroot(2, 4) + nthroot(3, 4))) = 0.202559
# б)
y := (sqrt(x^3 + n) + cos(|n*x - 1|))/nthroot(x^5 + 8*x + n, 4) = 2.30435
# в)
t := (sum(sin(i/n), i = 1 .. 10) + sum((i - n)/(i + n), i = 1 .. 5))/product((n + 3i)/(n^2 + n*i - n), i = 1 .. 5) = -1728.55 + 1728.55i
x := -2, -1.8 .. 2
# 3.
y(x) := 4*sin(2*x)/cos(3*x)^2 + sqrt(3*x^2)
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x = [-2; -1.8; -1.6; -1.4; -1.2; -1; -0.8; -0.6; -0.4; -0.2; 0; 0.2; 0.4; 0.6; 0.8; 1; 1.2; 1.4; 1.6; 1.8; 2]
y(x) = [6.74767; 7.51175; 33.2695; -3.15; -1.28132; -1.97904; -5.96755; -71.1828; -21.1606; -1.94032; 0; 2.63314; 22.5463; 73.2612; 8.73883; 5.44315; 5.43824; 7.99975; -27.7269; -1.27637; 0.180534]
# 4.
B := [7, 8, -7; -8, -9, 2; 7, -2, 6]
V := [4; -8; 1]
A := [1, -2, 1; 5, -2, 5; -5, 7, 4]
d := |A|*|B| = -29304
C := A*B = [30, 24, -5; 86, 48, -9; -63, -111, 73]
g := transpose(V)*A*V = -316
E := A^-1*C - B = [
    -1.77636e-15, 3.55271e-15, -8.88178e-16;
    1.77636e-15, 3.55271e-15, -2.22045e-16;
    -1.77636e-15, 0, 0
]
S := B*V = [-43; 42; 50]
q := max(A) = 7
p := min(B) = -9
# 5.
z := integral(cos(t^3)^2 + sqrt(10*t^2), t = π/6. .. π)
z = 16.5211
# 6.
x := -6, -5.8 .. 6
y := -6, -5.8 .. 6
n := 60
f(x, y) := e^(sin(x) + cos(y))
x = [
    -6; -5.8; -5.6; -5.4; -5.2; -5; -4.8; -4.6; -4.4; -4.2
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]
y = [
    -6; -5.8; -5.6; -5.4; -5.2; -5; -4.8; -4.6; -4.4; -4.2
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]
f(x, y) =  # no stored result
# [component: inputs f]
