y(x) := e^(x + 1) + x^2 - 4
y1(x) := 2*x + sin(x) - 1
# 1
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# 3
x1 := 1
x2 := 1
x3 := 1
x4 := 1
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Given
9*x1 + 10*x2 - 7*x3 - x4 == 23
7*x1 - x3 - 5*x4 == 37
5*x1 - 2*x2 + x4 == 22
x := -2, 0 .. 1
4*x1 + x2 + 2*x3 + 3*x4 == 26
Find(x1, x2, x3, x4) = [5; 0.846154; 4.53846; -1.30769]
root(y(x), x) = [-1.89511; 0.354392]
root(y1(x1), x1) = 0.335418
# 2
x^4 + 6*x^3 + x^2 - 4*x - 60
A := [9, 10, -7, -1; 7, 0, -1, -5; 5, -2, 0, 1; 4, 1, 2, 3]
B := [23; 37; 22; 26]
X := A^-1*B = [5; 0.846154; 4.53846; -1.30769]
v := transpose([-60, -4, 1, 6, 1])
polyroots(v) = [-6; -1 - 2i; -1 + 2i; 2]
lsolve(A, B) = [5; 0.846154; 4.53846; -1.30769]
x := 1
y := 1
Given
# 4
cos(x) + y == 1.5
2*x - sin(y - 0.5) == 1
Minerr(x, y) = [0.581926; 0.664594]
