f3(z) := ln(z)
z := -5 .. 5
f1(x) := sqrt(x)
f2(z) := e^z
# 1 | 3
limit((y^3 + 3*y^2 + 2*y)/(y^2 - y - 6), y → -2) → -2/5
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x := 3
d/dx((4*sin(2*x))/cos(3*x)^2 + sqrt(3*x^2)) = 14.6387
integral((5*x + 3)^10, x) → 64268410079232/55 = 1.16852e12
# 2
# 4
i := 0, 0.5 .. 3
x^4 + 6*x^3 + x^2 - 4*x - 60 == 0
k := 6
b := -1.74
[2; -6; -1 + 2i; -1 - 2i]
F(i) := if(i < 1.5, cos(i + b), i + k^2)
F(i) = [-0.168397; 0.324796; 0.738469; 37.5; 38; 38.5; 39]
i = [0; 0.5; 1; 1.5; 2; 2.5; 3]
2*x + (sin(x) - 1) == 0
0
e^(x + 1) + x^2 - 4 == 0
0
