a := 1.5
x := 0.8, 0.95 .. 2
k := 6
i := 0, 0.5 .. 3
# 3 | 2
G(i) :=
    b ← -1.74
    for i ∈ 0 .. i
        d ← cos(i + b) if i < 1.5
        d ← i + k^2 if i ≥ 1.5
    d
y(x) :=
    π*x^2 - 7/x^2 if x < 1.3
    a*x^3 + 7*sqrt(x) if x == 1.3
    ln(x + 7*sqrt(x)) if x > 1.3
y(x) = [-8.92688; -4.92095; -1.9838; 0.428739; 2.27032; 2.32873; 2.38203; 2.43107; 2.4765]
x = [0.8; 0.95; 1.1; 1.25; 1.4; 1.55; 1.7; 1.85; 2]
G(i) = [-0.168397; -0.168397; 0.738469; 0.738469; 38; 38; 39]
# 1
l(m) :=
    z ← sqrt((3*m + 2)^2 - 24*m)/(3*sqrt(m) - 2/sqrt(m))
    return z
l(x) = [0.894427; 0.974679; 1.04881; 1.11803; 1.18322; 1.24499; 1.30384; 1.36015; 1.41421]
